# Задача 1
π = 3.14159
e = 2.71828
TOL = 1*1*10^-3
ORIGIN = 0
sqrt(-1) = 1i
% = 0.01
# Задача 2
sin(π/6) = 0.5
sum(sin(1i)^2, n = 1 .. 5) = -6.90549
product(sqrt(m), m = 3 .. 8) = 141.986
limit(sin(x)/x, x → 0) → 1
integral(sin(x), x = -π .. π) = 0
sin(3)^2 + cos(3)^2 = 1
|cos(-2*π/3)| = 0.5
# Задача 3
a := 10
b := 5
c := 7
S := a*b*c
S = 350
# Задача 4
xo := -5
xn := 5
h := 0.3
a := 0.5
b := 0.2
x := xo, xo + h .. xn
y(x) := 2*cos(x^2)
z(x) := e^(-a*x)*sqrt(|x| + 1) + e^(-b*x)*sqrt(|x| + 1)
y(x) = [
    1.98241; -1.99024; 1.74506; -0.90356; -0.596451; 1.90074; -1.37141; -1.05562; 1.77692; 1.09205
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]
z(x) = [
    36.4993; 31.1458; 26.5747; 22.6699; 19.3328; 16.4792; 14.0373; 11.9461; 10.1534; 8.61476
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]
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