# Работа с матрицами и векторами
# Задача 1
V1 := [-5; 3; 6; 7]
V2 := [13; -34; 64; 98]
V3 := V1 + V2
V3 = [8; -31; 70; 105]
V4 := V1 - V2
V4 = [-18; 37; -58; -91]
V5 := V1*V2
V5 = 903
V6 := vectorize(V1*V2)
V6 = [-65; -102; 384; 686]
V7 := V1/V2
V7 = [-0.384615; -0.0882353; 0.09375; 0.0714286]
vectorize(V1)^3 = [-125; 27; 216; 343]
transpose(V1) = [-5, 3, 6, 7]
V8 := (V2*2)/2
V8[2] = 64
V2*2 = [26; -68; 128; 196]
V8 = [13; -34; 64; 98]
V2[3] = 98
sum(V1) = 11
# Задача 2
M1 := [6, -2, 9; 7, 5, -6; 3, 5, -1]
M2 := [-8, 5, 2; -6, 9, 5; -1, 4, 3]
M3 := M1 + M2
M3 = [-2, 3, 11; 1, 14, -1; 2, 9, 2]
M4 := M1 - M2
M4 = [14, -7, 7; 13, -4, -11; 4, 1, -4]
M5 := M1*M2
M5 = [-45, 48, 29; -80, 56, 21; -53, 56, 28]
M6 := vectorize(M1*M2)
M6 = [-48, -10, 18; -42, 45, -30; -3, 20, -3]
M7 := M1/M2
M7 = [5.66667, -11.6667, 18.6667; -9.71429, 15.2857, -21; -4.80952, 7.52381, -9.66667]
M8 := vectorize(M1/M2)
M8 = [-0.75, -0.4, 4.5; -1.16667, 0.555556, -1.2; -3, 1.25, -0.333333]
M9 := M1^2
M9 = [49, 23, 57; 59, -19, 39; 50, 14, -2]
M10 := vectorize(M1)^2
M10 = [49, 23, 57; 59, -19, 39; 50, 14, -2]
transpose(M1) = [6, 7, 3; -2, 5, 5; 9, -6, -1]
M2*2 = [-16, 10, 4; -12, 18, 10; -2, 8, 6]
(M2*2)/2 = [-8, 5, 2; -6, 9, 5; -1, 4, 3]
|M1| = 352
M1[:, 1] = [-2; 5; 5]
transpose(M1)[:, 2] = [3; 5; -1]
M2[2, 2] = 3
M2^-1 = [-0.333333, 0.333333, -0.333333; -0.619048, 1.04762, -1.33333; 0.714286, -1.28571, 2]
[M1[0, 2]; M1[1, 1]; M1[2, 0]] = [9; 5; 3]
Sum1 := M1[0, 0] + M1[0, 1]
Sum1 = 4
Sum2 := M1[0, 0] + M1[1, 0]
Sum2 = 13
# Задача 3
length(V1) = 4
mean(V1) = 2.75
mean(M1) = 2.88889
max(V2) = 98
max(M2) = 9
min(V2) = -34
min(M2) = -8
diag(M1) = [6; 5; -1]
tr(M1) = 10
sort(V1) = [-5; 3; 6; 7]
-sort(-V2) = [98; 64; 13; -34]
last(V1) = 3
cols(M1) = 3
rows(M2) = 3
tr(M1) = 10
csort(M1, 0) = [3, 5, -1; 6, -2, 9; 7, 5, -6]
csort(M2, 1) = [-1, 4, 3; -8, 5, 2; -6, 9, 5]
identity(3) = [1, 0, 0; 0, 1, 0; 0, 0, 1]
augment(M1, M2) = [6, -2, 9, -8, 5, 2; 7, 5, -6, -6, 9, 5; 3, 5, -1, -1, 4, 3]
