Origin == 1  # 3. Решение уравнений  # Вариант 6
# Решение линейных уравнений
# Задача 1
a11 := 4.5
a12 := 0.08
a13 := -0.15
b1 := 9
a21 := 0.4
a22 := -7.2
a23 := 0.3
b2 := 11.4
a31 := -0.6
a32 := 0.65
a33 := 3
b3 := 14
A := [4.5, 0.08, -0.15; 0.4, -7.2, 0.3; -0.6, 0.65, 3]
B := [9; 11.4; 14]
X1 := transpose(B)/transpose(A) = [2.20116, -1.23709, 5.37493]
X2 := A^-1*B = [2.20116; -1.23709; 5.37493]
X3 := lsolve(A, B)
X3 = [2.20116; -1.23709; 5.37493]
x1 := X3[0]
x2 := X3[1]
x3 := X3[2]
x1 = 2.20116
x2 = -1.23709
x3 = 5.37493
# Проверка:
a11*x1 + a12*x2 + a13*x3 = 9
b1 = 9
# Решение нелинейных уравнений
# Задача 2
a3 := 0
a2 := -1.5
a1 := 3
a0 := 50
V := [a0; a1; a2; a3]
F1(x) := a3*x^3 + a2*x^2 + a1*x + a0
X := polyroots(V)
X = [-4.85947; 6.85947]
a3*X[0]^3 + a2*X[0]^2 + a1*X[0] + a0 = -1.42109e-14
x := -5, -4.5 .. 7
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x := -5
x1 := root(F1(x), x)
x1 = -4.85947
x := 7
x2 := root(F1(x)/(x - x1), x)
x2 = 6.85947
# Проверка:
a3*x1^3 + a2*x1^2 + a1*x1 + a0 = -7.81597e-14
F1(x1) = -7.81597e-14
a3*x2^3 + a2*x2^2 + a1*x2 + a0 = 0
F1(x2) = 0
# Задание 3
a3 := 0
a2 := -1.5
a1 := 3
a0 := 50
xo := -10
xn := 10
h := 0.3
F1(x) := a3*x^3 + a2*x^2 + a1*x^1 + a0
F2(x) := 45*|cos(x)|
x := -5, -4.5 .. 10
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x := 5.25
y := 25  # Первый корень
Given
y := F1(x)
y := F2(x)
[x1; y1] := Find(x, y)
[x1; y1] = [5.25; 23.0438]
x := -3
y := 35  # Второй корень
Given
y := F1(x)
y := F2(x)
[x1; y1] := Find(x, y)
[x1; y1] = [-3; 44.5497]
x := -100
y := 40  # Третий корень
Given
y := F1(x)
y := F2(x)
[x1; y1] := Find(x, y)
[x1; y1] = [-100; 38.8043]
