# Символьные вычисления
# Задача 1 | Задача 1
# Вычислить:
sum(n^3, n) → n^2*(n + 1)^2/4
sum(n^3, n)  # Вывод
n^2*(n + 1)^2/4
(2 + 3)*e → 5*e
(2 + 3)*e
# Вывод
5*e
(2 + 3)*e float, 10 → 13.59140914
(2 + 3)*e  # Выдавать вычисления с плавающей запятой
13.59140914
sqrt(-1) rectangular → 1i
sqrt(-1)  # вычисление по комплексным выходам плоскости
1i
sqrt(-5) rectangular → 0 + sqrt(5)*1i
sqrt(-5)  # вычисление по комплексным выходам плоскости
0 + sqrt(5)*1i
# Упростить:
# упрощает к
1
sin(x/2)^2 + cos(x/2)^2 simplify → 1
sin(x/2)^2 + cos(x/2)^2
d/dx(cos(x)) simplify → -sin(x)
# упрощает к
-sin(x)
d/dx(cos(x))
# упрощает к
Si(t)
integral(sin(x)/x, x = 0 .. t) simplify → Si(t)
integral(sin(x)/x, x = 0 .. t)
# Развернуть:
(a + b)^3  # расширяется до
a^3 + 3*a^2*b + 3*a*b^2 + b^3
(a + b)^3 expand → a^3 + 3*a^2*b + 3*a*b^2 + b^3
sum(n^2, n)  # расширяется до
sum(n^2, n) expand → n^3/3 + n^2/2 + n/6
n^3/3 + n^2/2 + n/6
product(sin(x)^2 + cos(x)^2, x) expand → 1
# расширяется до
1
product(sin(x)^2 + cos(x)^2, x)
(x + y)*(x - y) expand → x^2 - y^2
(x + y)*(x - y)
# расширяется до
x^2 - y^2
# Факторизовать:
x^3 - 6*x^2 + 11*x - 6 factor → (x - 3)*(x - 1)*(x - 2)
# разложением на множители, выдавать
(x - 3)*(x - 1)*(x - 2)
x^3 - 6*x^2 + 11*x - 6
(x - 3)*(x - 1)*(x - 2) expand → x^3 - 6*x^2 + 11*x - 6
(x - 3)*(x - 1)*(x - 2)  # расширяется до
x^3 - 6*x^2 + 11*x - 6
# Сборка:
(x - 1)*(x - 2)*x collect → x^3 - 3*x^2 + 2*x
(x - 1)*(x - 2)*x  # приведением подобных, выдавать
x^3 - 3*x^2 + 2*x
(x - a)*(x - 2*a) collect, a → 2*a^2 + (-3*x*a) + x^2
(x - a)*(x - 2*a)  # приведением подобных, выдавать
2*a^2 + (-3*x*a) + x^2
# Полиномиальные коэфиценты:
# имеет коэффициенты
a*x^3 + b*x^2 + c*x + d coeffs, x → [d; c; b; a]
a*x^3 + b*x^2 + c*x + d
[d; c; b; a]
# имеет коэффициенты
0*x^3 - 4.5*x^2 + 1*x + 120 coeffs, x → [120; 1; -4.5]
0*x^3 - 4.5*x^2 + 1*x + 120
[120; 1; -4.5]
# Решить: | Задача 2 | Задача 2
x^4 + 9*x^3 + 31*x^2 + 59*x + 60
# имеет решение(я)
x^4 + 9*x^3 + 31*x^2 + 59*x + 60 solve → [-3.0; -4.0; -1.0 - 2.0i; -1.0 + 2.0i]
[-3.0; -4.0; -1.0 - 2.0i; -1.0 + 2.0i]
0.5*x^3 - 4*x^2 + 5*x + 25 solve → [-1.80510409672; 4.90255204836 - 1.91421445687i; 4.90255204836 + 1.91421445687i]
0.5*x^3 - 4*x^2 + 5*x + 25
# имеет решение(я)
[-1.80510409672; 4.90255204836 - 1.91421445687i; 4.90255204836 + 1.91421445687i]
# Подставить:
a*x^2 + b*x + c substitute, x == y - a → a^3 - 2*a^2*y + a*y^2 - b*a + b*y + c
a*x^2 + b*x + c
y - a
# подстановкой, выдавать
a^3 - 2*a^2*y + a*y^2 - b*a + b*y + c
# Дифференцировать:
a*x^3 + b*x^2 + c
a*x^3 + b*x^2 + c
# дифференцированием, выдавать
3*a*x^2 + 2*b*x
sin(a*x)
# дифференцированием, выдавать
a*cos(a*x)
# интегрированием, выдавать
sin(a*x) series, x, 6 → a*x - a^3*x^3/6 + a^5*x^5/120
sin(a*x)
# преобразовывает в ряд
a*x - a^3*x^3/6 + a^5*x^5/120
a := 2
f1(x) := sin(a*x)
f2(x) := a*x - a^3*x^3/6 + a^5*x^5/120
x := -π/2, -π/2 + π/9 .. π/2
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(2*x^2 - 3*x + 1)/(x^3 + 2*x^2 - 9*x - 18) parfrac, x →  # error: Никакая независимая переменная.
(2*x^2 - 3*x + 1)/(x^3 + 2*x^2 - 9*x - 18)
# расширяется в элементарных дробях до
1/(3*(x - 3)) - 3/(x + 2) + 14/(3*(x + 3))
# Задача 3 | Задача 3
[a, b; c, d]  # транспозицией матрицы, выдавать
[a, c; b, d]
transpose([a, b; c, d]) → [2, c; b, d]
[a, b; c, d]  # обращением матрицы, выдавать
[d/(a*d - b*c), -b/(a*d - b*c); -c/(a*d - b*c), a/(a*d - b*c)]
[a, b; c, d]^-1 → [d/(2*d - b*c), -b/(2*d - b*c); -c/(2*d - b*c), 2/(2*d - b*c)]
a*d - b*c
[a, b; c, d]  # определитель
det([a, b; c, d]) → 2*d - b*c
# Задача 4 | Задача 4
a*t
# преобразование Фурье
-2i*π*a*Δ(1, ω)
a*t invfourier → 2*t*Δ(tt)
a*t
# преобразование Лапласа
a/s^2
a*t invlaplace → 2*t*Δ(tt)
a*t invztrans → 2*t*δ(n, 0)
# a*t | z преобразование
a*z/(z - 1)^2
# Задача 5
limit(exp(x), x → ∞) → ∞
limit((4*x^2 - 1)/(2*x - 1), x → 1/2) → 2
