# Программирование линейных структур
# 1 способ: | Задача 1
xo := -2.5
xn := 2
h := 0.5
b := 5
y(x) := x^2*(x + 1)/b - b*sin(x + 1)^2
x := xo, xo + h .. xn
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x = [-2.5; -2; -1.5; -1; -0.5; 0; 0.5; 1; 1.5; 2]
y(x) = [-6.84998; -4.34037; -1.37424; 0; -1.12424; -3.54037; -4.89998; -3.73411; -0.665845; 2.30043]
# 2 способ:
# 1. С оператором локального
# присваивания.
# 2. С оператором глобального
# присваивания.
P :=
    b ← 5
    x ← 1
    y ← x + 1
    P ← x^2*y/b - b*sin(y)^2
    = -3.73411
FP(x) :=
    y ← x + 1
    x^2*y/b - b*sin(y)^2
x := 1
b := 5
FP(x) = -3.73411
FP(2) = 2.30043
FP(0) = -3.54037
# Задача 2.
# 1 Способ.
a := 4
b := 6
c := 2
F(x) := a*x^2 + b*x + c
d := b^2 - 4*a*c
d = 4
x1 := (-b + sqrt(d))/(2*a)
x2 := (-b - sqrt(d))/(2*a)
x1 = -0.5
x2 = -1
# Проверка:
F(x1) = 0
F(x2) = 0
# 2 Способ.
roots(a, b, c) :=
    d ← b^2 - 4*a*c
    x1 ← (-b + sqrt(d))/(2*a)
    x2 ← (-b - sqrt(d))/(2*a)
    return [x1; x2]
roots(0, 4, 2) =  # error: Деление на ноль.
roots(1, 4, 20) = [-2 + 4i; -2 - 4i]
a := 1
b := 4
c := 20
F(x1) = 0
F(x2) = 0
roots(1, 2, -1) = [0.414214; -2.41421]
a := 1
b := 2
c := -1
F(x1) = 0
F(x2) = 0
