# Программирование разветвляющихся структур
# Задача 1
f(x) := cos(x)
y(x) := if(f(x) ≥ 0, f(x), 0)
z(x) := if(f(x) ≥ 0, f(x), -f(x))
x := 0, 0.1 .. 20
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f1(x) :=
    cos(x) if x ≥ 0
    0 otherwise
f2(x) :=
    cos(x) if cos(x) ≥ 0
    0 otherwise
f3(x) :=
    |cos(x)| if x ≥ 0
    0 otherwise
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# Задача 2
t(x) :=
    e^x if 0 ≤ x < 1
    (20*sin(x)) if 1 < x ≤ 4
    sum(x/n^n, n = 1 .. 10) if 4 < x < 5
    (x^3 + 1) if x ≥ 5
    "no" otherwise
x := 0, 1 .. 10
x = [0; 1; 2; 3; 4; 5; 6; 7; 8; 9; 10]
t(x) = [1; "no"; 18.1859; 2.8224; -15.136; 126; 217; 344; 513; 730; 1001]
x := 0, 0.2 .. 10
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t(1) = "no"
t(4) = -15.136
# Задание 3
f(x, y) := 1/(x^2*y^2)
f(x, y) :=
    1/(x^2*y^2) if x*y ≠ 0
    0 otherwise
x := -16, -15 .. 16
y := -16, -15 .. 16
# [component: inputs f]
# [component: inputs f]
