# Программирование итерационных
# циклических структур
# Задание 1
sin(x)  # converts to the series
x - x^3/6 + x^5/120 - x^7/5040 + x^9/362880
E := 0.005
n := 0 .. 10
x := 1.2
a[n] := (-1)^n*x^(2*n + 1)/(2*n + 1)!
a[n + 1] := (-1)^(n + 1)*x^(2*(n + 1) + 1)/(2*(n + 1) + 1)!
q(n) := a[n + 1]/a[n]
(-1)^(n + 1)*x^(2*(n + 1) + 1)/(2*(n + 1) + 1)!/((-1)^n*x^(2*n + 1)/(2*n + 1)!)  # simplifies to
-x^2/(2*(n + 1)*(2*n + 3))
a[n + 1] := a[n]*q(n)
a[0] := x
s[0] := 0
n := 0 .. 5
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a[n + 1] := until(|a[n]| - E, -x^2*a[n]/(2*(n + 1)*(2*n + 3)))
a[n] = [1.2; -0.288; 0.020736; -0.000710949; 1.4219e-5; -1.86139e-7]
s[n + 1] := until(|a[n]| - E, a[n] + s[n])
transpose(s) = [0, 1.2, 0.912, 0.932736]
sin(1.2) = 0.932039
|0.933 - 0.932| = 0.001
y :=
    x ← 1.2
    E ← 0.005
    y[:, 0] ← [0; 0; 0]
    n ← 0
    a ← x
    s ← a
    while |a| > E
        y[:, n] ← [a; s; n]
        q ← -x^2/(2*(n + 1)*(2*n + 3))
        a ← a*q
        s ← s + a
        n ← n + 1
    transpose(y)
res := y
a := res[:, 0]
s := res[:, 1]
n := res[:, 2]
a = [1.2; -0.288; 0.020736]
s = [1.2; 0.912; 0.932736]
n = [0; 1; 2]
a := 1.65  # Задание 2
t(x) := if(0 < x < 3, ln(x + a)^2, 3*tan(x))
xo := 0
xn := 7
x := xo, xo + 0.3 .. xn
x = [0; 0.3; 0.6; 0.9; 1.2; 1.5; 1.8; 2.1; 2.4; 2.7; 3; 3.3; 3.6; 3.9; 4.2; 4.5; 4.8; 5.1; 5.4; 5.7; 6; 6.3; 6.6; 6.9]
t(x) = [0; 0.445996; 0.657608; 0.876271; 1.09688; 1.31653; 1.53357; 1.74704; 1.95641; 2.16142; -0.42764; 0.479237; 1.4804; 2.84227; 5.33334; 13.912; -34.1546; -7.34817; -3.65262; -1.97919; -0.873019; 0.0504488; 0.983574; 2.12733]
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f :=
    x ← -0.6
    dx ← 0.3
    n ← 0
    y[:, 0] ← [0; 0; 0]
    while x ≤ 7
        z[n] ← ln(x + a)^2 if 0 < x < 3
        z[n] ← 3*tan(x) if x ≥ 3
        z[n] ← "no" otherwise
        y[:, n] ← [n; x; z[n]]
        x ← x + dx
        n ← n + 1
    y
n := transpose(f)[:, 0]
x := transpose(f)[:, 1]
t := transpose(f)[:, 2]
f = [
    0, 1, 2, 3, 4, 5, 6, 7, 8, 9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;
    -0.6, -0.3, 0, 0.3, 0.6, 0.9, 1.2, 1.5, 1.8, 2.1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;
    "no", "no", "no", 0.445996, 0.657608, 0.876271, 1.09688, 1.31653, 1.53357, 1.74704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]
n = [0; 1; 2; 3; 4; 5; 6; 7; 8; 9; 10; 11; 12; 13; 14; 15; 16; 17; 18; 19; 20; 21; 22; 23; 24; 25]
x = [-0.6; -0.3; 0; 0.3; 0.6; 0.9; 1.2; 1.5; 1.8; 2.1; 2.4; 2.7; 3; 3.3; 3.6; 3.9; 4.2; 4.5; 4.8; 5.1; 5.4; 5.7; 6; 6.3; 6.6; 6.9]
t = ["no"; "no"; "no"; 0.445996; 0.657608; 0.876271; 1.09688; 1.31653; 1.53357; 1.74704; 1.95641; 2.16142; 2.36196; 0.479237; 1.4804; 2.84227; 5.33334; 13.912; -34.1546; -7.34817; -3.65262; -1.97919; -0.873019; 0.0504488; 0.983574; 2.12733]
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