# Программирование итерационных
# циклических структур
# Задание 1
# С помощью until
sin(x)  # преобразовывает в ряд
x - x^3/6 + x^5/120 - x^7/5040 + x^9/362880
E := 0.005
x := 1.2
n := 0 .. 6
a[n] := -1^n*x^(2*n + 1)/(2*n + 1)!
a[n + 1] := -1^(n + 1)*x^(2*(n + 1) + 1)/(2*(n + 1) + 1)!
q(n) := a[n + 1]/a[n]
# упрощает к
x^2/(2*(n + 1)*(2*n + 3))
-1^(n + 1)*x^(2*(n + 1) + 1)/(2*(n + 1) + 1)!/(-1^n*x^(2*n + 1)/(2*n + 1)!)
a[0] := 1
s[0] := 0
a[n + 1] := until(|a[n]| - E, x^2*a[n]/(2*(n + 1)*(2*n + 3)))
a[n] = [1; 0.24; 0.01728; 0.000592457; -1.4219e-5; -1.86139e-7; -1.71821e-9]
s[n + 1] := until(|a[n]| - E, a[n] + s[n])
transpose(s) = [0, 1, 1.24, 1.25728]
# С помощью while
y :=
    x ← 1.2
    E ← 0.005
    y[:, 0] ← [0; 0; 0]
    n ← 0
    a ← 1
    s ← a
    while |a| > E
        y[:, n] ← [a; s; n]
        q ← x^2/(2*(n + 1)*(2*n + 3))
        a ← a*q
        s ← s + a
        n ← n + 1
    transpose(y)
res := y
a := res[:, 0]
s := res[:, 1]
n := res[:, 2]
a = [1; 0.24; 0.01728]
s = [1; 1.24; 1.25728]
n = [0; 1; 2]
sin(1.2) = 0.932039
|0.932 - 1.257| = 0.325
# Задание 2
