# Программирование регулярных
# циклических структур
# Задача 1, 2
b := 2
z := product(cos(k) + sin(b*k), k = 1 .. 8)
t := sum(product(b^2*a, a = 2 .. 5), b = 1 .. 5)
z = 0.0604213
t = 55557480
z1 :=
    b ← 2
    p ← 1
    for n ∈ 1 .. 8
        y ← cos(n) + sin(b*n)
        p ← p*y
    p
t1 :=
    s ← 0
    for b ∈ 1 .. 5
        p ← 1
        for a ∈ 2 .. 5
            y ← b^2*a
            p ← p*y
            y
        s ← s + p
    s
z1 = 0.0604213
t1 = 55557480
# Задача 3
G := [1; 2; 3; 4; 5; 6; 7; 8; 9; 10; 11; 12; 13; 14; 15; 16]
F :=
    M ← G
    for n ∈ 0 .. 15
        G[n] ← M[n - 14] if n ≥ 14
        G[n] ← G[n + 2] otherwise
    G
F = [3; 4; 5; 6; 7; 8; 9; 10; 11; 12; 13; 14; 15; 16; 1; 2]
